// COMSOL Multiphysics 6.3.0.335 model "ArbitraryBIC_withS3 (1).mph"
// Band-Gap Analysis of a Photonic Crystal
// The model investigates the wave propagation in a photonic crystal that consists of GaAs pillars placed equidistant from each other. The photonic crystal structure is the same as the one used in the other photonic crystal model, but this example extracts the band diagram for the lowest bands of the crystal. It performs a nonlinear sweep of an eigenvalue analysis, using the nonlinear solver with an extra normalization equation for the eigenvalue.
// Outline of the model tree

Parameters
  a = 580[nm]  // Primitive cell side length
  b = 105[nm]  // GaAs pillar radius
  k = 0  // Fraction of wave vector magnitude
  k1 = if(k<1,(1-k),if(k<2,(k-1),1))  // First component of wave direction vector
  k2 = if(k<1,(1-k),if(k<2,0,(k-2)))  // Second component of wave direction vector
  a1x = a  // First lattice vector, x component
  a1y = 0[nm]  // First lattice vector, y component
  a2x = 0[nm]  // Second lattice vector, x component
  a2y = a  // Second lattice vector, y component
  band = 1  // Band number
  thick = 600[nm]  // 600
  d33 = epsilon0_const*2.45e-19[m^2/V^2]
  alpha = 0
  rot = 18[deg]

Variables
  var2 "Variables 2"
    b1x = 2*pi*a2y/(a1x*a2y-a1y*a2x)  // First reciprocal lattice vector, x component
    b1y = -2*pi*a2x/(a1x*a2y-a1y*a2x)  // First reciprocal lattice vector, y component
    b2x = -2*pi*a1y/(a1x*a2y-a1y*a2x)  // Second reciprocal lattice vector, x component
    b2y = 2*pi*a1x/(a1x*a2y-a1y*a2x)  // Second reciprocal lattice vector, y component
    kx = k1*b1x/2+k2*b2x/2  // Floquet vector, x component
    ky = k1*b1y/2+k2*b2y/2  // Floquet vector, y component
    A = intop1(1)  // Area
    nEz = intop1(realdot(ewfd2.Ez,ewfd2.Ez))/A  // Normalization integral
    fEx = aveop1(ux)
    fEy = aveop1(uy)
    cx = intop1(exp(-i*kx*x-i*ky*y)*conj(ewfd.Ex))
    cy = intop1(exp(-i*ky*y-i*kx*x)*conj(ewfd.Ey))
    cxnorm = cx/intop1(1)
    cynorm = cy/intop1(1)
    cnx = intop1(exp(-i*kx*x-i*ky*y)*conj(ewfd2.Ex))
    cny = intop1(exp(-i*ky*y-i*kx*x)*conj(ewfd2.Ey))
    cnxnorm = cnx/intop1(1)
    cnynorm = cny/intop1(1)
    cx_down = intop2(exp(-i*kx*x-i*ky*y)*conj(ewfd.Ex))
    cy_down = intop2(exp(-i*ky*y-i*kx*x)*conj(ewfd.Ey))
    cx_down_norm = cx_down/intop2(1)
    cy_down_norm = cy_down/intop2(1)
    S3 = i*(cx*conj(cy)-cy*conj(cx))
    S0 = cx*conj(cx)+cy*conj(cy)

Couplings
  aveop1: Average "平均值 1" on boundaries 15
  intop1: Integration "积分 1" on boundaries 15
  intop2: Integration "积分 2" on boundaries 6

Probes
  point1: Point "点探针 1" on no points | expr = ewfd3.Efarx; unit = V/m; descr = 远场变量，x 分量
  point2: Point "点探针 2" on no points | expr = ewfd3.Efary; unit = V/m; descr = 远场变量，y 分量

Coordinate systems
  sys2: Boundary "Boundary System 2"
  pml1: PML "Perfectly Matched Layer 1" on domains 5
  pml2: PML "Perfectly Matched Layer 2" on domains 1

Geometry
  geom2 "Geometry 2" (3D, length unit nm)
    blk1: Block | size = {a, a, thick}; base = center
    blk2: Block | size = {a, a, 2[um]*2}; base = center; layerbottom = off; layertop = on
    blk5: Block | size = {a, a, 2[um]*2-1400}; base = center; layerbottom = off; layertop = on
    pt1: Point "点 1" (disabled) | p = {, , 0.8[um]}; contributeto = csel1
    ext1: Extrude "拉伸 1" (disabled) | distance = thick/2
    cone1: Cone "圆锥体 1" (disabled) | r = 175[nm]; h = thick/2; specifytop = radius; rtop = (175)[nm]; contributeto = csel2
    cone2: Cone "圆锥体 1.1" (disabled)
      r = 175[nm]
      h = thick/4
      specifytop = radius
      rtop = (175)[nm]
      pos = {60[nm], 0, -thick}
    blk3: Block (disabled)
      size = {175[nm]*2, 175[nm], thick/2}
      base = center
      pos = {0, 175[nm]/2, thick/4}
      contributeto = csel2
    blk4: Block (disabled) | size = {175[nm], 175[nm], thick/2}; pos = {-175[nm], 0, 0}; contributeto = csel2
    dif1: Difference (disabled) | input = cone1; input2 = blk3; keepsubtract = on
    wp1: WorkPlane | unite = on
      e1: Ellipse (disabled) | semiaxes = {175[nm], 175[nm]}; angle = 90; rot = 90; iscircularsectorold = on
      e2: Ellipse (disabled) | semiaxes = {175[nm], 175[nm]}; angle = 180; rot = 180; iscircularsectorold = on
      r1: Rectangle (disabled) | size = {175[nm], 175[nm]}
      r2: Rectangle (disabled) | size = {165[nm]*2, 165[nm]*2}; base = center
      pol1: Polygon (disabled) | source = table; table = {{0, 0}, {175, 0}, {175, 135}, {135, 175}, {0, 175}}
      pol2: Polygon (disabled) | source = table; table = {{0, 0}, {175, 0}, {175, 135}, {135, 175}, {0, 175}}
      pol3: Polygon | source = table; table = {{165*(1-alpha), 165}, {165, -165}, {-165, -165}, {-165*(1-alpha), 165}}
      rot1: Rotate | input = pol3
    ext2: Extrude | workplane = wp1; input = wp1; distance = thick/2
    wp2: WorkPlane | unite = on
      e1: Ellipse (disabled) | semiaxes = {175[nm], 175[nm]}; angle = 90; rot = 90; iscircularsectorold = on
      e2: Ellipse (disabled) | semiaxes = {175[nm], 175[nm]}; angle = 180; rot = 180; iscircularsectorold = on
      r1: Rectangle (disabled) | size = {175[nm], 175[nm]}
      r2: Rectangle (disabled) | size = {165[nm]*2, 165[nm]*2}; base = center
      pol1: Polygon (disabled) | source = table; table = {{0, 0}, {175, 0}, {175, 135}, {135, 175}, {0, 175}}
      pol2: Polygon (disabled) | source = table; table = {{0, 0}, {175, 0}, {175, 135}, {135, 175}, {0, 175}}
      pol3: Polygon | source = table; table = {{165*(1-alpha), 165}, {165, -165}, {-165, -165}, {-165*(1-alpha), 165}}
      rot1: Rotate | input = pol3
    ext3: Extrude | workplane = wp2; input = wp2; distance = -thick/2
    rot1: Rotate "旋转 1" | input = ext2; rot = rot
    rot2: Rotate "旋转 2" | input = ext3
    fin: Finalize "Form Union"

Materials
  mat2: Common "Material 2" on domains 1-7
    RefractiveIndex: RefractiveIndex
      n = 1
      ki = 0
  mat3: Common "Material 3" on domains 3
    RefractiveIndex: RefractiveIndex
      n = 3.5
      ki = 0

Physics
  ewfd: ElectromagneticWavesFrequencyDomain on all domains
    dependent variable E3 = {E3x, E3y, E3z}
    BackgroundField.ktMax = (2*(sqrt(2*log(10))))/ewfd3.w0
    PortOptions.PortFormulation = ConstraintBased
    wee1: WaveEquationElectric (default) | epsilonInf_mat = from_mat; minput_frequency = root.freq
    pec1: PerfectElectricConductor (default)
    init1: init "Initial Values 1" (default)
    pc1: PeriodicCondition on boundaries 1, 4, 7, 10, 13, 41-45
      PeriodicType = Floquet
      kFloquet = {kx, ky, 0}
      destinationDomains: boundaries 41-45
    pc2: PeriodicCondition on boundaries 2, 5, 8, 11, 14, 17-21
      PeriodicType = Floquet
      kFloquet = {kx, ky, 0}
      destinationDomains: boundaries 17-21
    pmc1: PerfectMagneticConductor (disabled) on boundaries 3
    ffd1: FarFieldDomain "远场域 1" (disabled) on domains 1, 4, 5
      ffc1: FarFieldCalculation "远场计算 1" on boundaries 10, 11, 13-15, 20, 21, 44, 45

Mesh
  mesh2 "Mesh 2" (physics-controlled)
    size: MeshSizeDefault | hauto = 1

Studies
  std1 "Study 1"
    param2: Parametric "参数化扫描 2"
      sweeptype = filled
      pname = {k1, k2, alpha, rot}
      plistarr = {range(-0.04,0.02,0.04), range(-0.04,0.02,0.04), 0, 18}
      punit = {, , , deg}
    eig: Eigenfrequency | neigs = 1; eigunit = Hz; shift = c_const/1540[nm]

Datasets
  dset7: Solution
  dset9: Solution "Probe Solution 9"
  avh1: Average "点探针 1" | data = dset9
  avh2: Average "点探针 2" | data = dset9
  dset22: Solution
  dset23: Solution
  dset24: Solution
  dset25: Solution
  dset26: Solution
  dset27: Solution
  dset28: Solution

Derived values
  pev1: EvalPoint "点探针 1" | data = avh1; table = new; expr = ewfd3.Efarx
  pev2: EvalPoint "点探针 2" | data = avh2; table = new; expr = ewfd3.Efary
  gev3: EvalGlobal "Global Evaluation 3"
    data = dset27
    expr = {ewfd.lambda0, ewfd.Qfactor}
    unit = {m, }
    descr = {Wavelength in free space, Quality factor}
  gev4: EvalGlobal "全局计算 4"
    data = dset23
    expr = {arg(-cy_down_norm+i*cx_down_norm)*180/pi, arg(-cynorm+i*cxnorm)*180/pi}
    unit = {rad, rad}
  gev5: EvalGlobal "全局计算 5" | data = dset23; expr = atan(cxnorm/cynorm)*180/pi; unit = rad
  gev6: EvalGlobal "全局计算 6"
    data = dset27
    expr = {cxnorm, cynorm, cx_down_norm, cy_down_norm}
    unit = {V/m, V/m, V/m, V/m}

Plots
  pg18: PlotGroup1D "1D Plot Group 18" | data = dset23; xlabel = kx; ylabel = ky
    plz1: Polarization
      data = dset28
      xexpr = cynorm/1e8
      yexpr = cxnorm/1e8
      centerpos = user
      xcenter = k1
      ycenter = k2
      col1: Color "Color Expression 1" | expr = S3/S0